f(x) := e^(-2*x) - 1 + x^2
e := 10^-6
bisection(a, b, e) :=
    z ← (a + b)/2
    i ← 0
    while |f(z)| > e and i < 40
        i ← i + 1
        b ← z if f(a)*f(z) < 0
        a ← z otherwise
        z ← (a + b)/2
        return z if |a - b| < e
    return z
result := bisection(0.7, 2, e) = 0.916563
